# 1-2. Массив случайных значений "0" и "1" длинной N и величина SNR
N := 512
rndNumbers(N) :=
    for count ∈ 0 .. N - 1
        number ← rnd(1)
        if number ≤ 0.5
            number ← 0
        else
            number ← 1
        result[count] ← number
    return result
rndNumbersRes := rndNumbers(N)
# 3. Массив QPSK символов длинной N/2
QPSK(inMass, N) :=
    i ← 0
    count ← 1
    while count ≤ (N - 1)
        if (inMass[count - 1] == 0) and (inMass[count] == 0)
            result[i] ← 1 + 1j
            i ← i + 1
        if (inMass[count - 1] == 0) and (inMass[count] == 1)
            result[i] ← -1 + 1j
            i ← i + 1
        if (inMass[count - 1] == 1) and (inMass[count] == 1)
            result[i] ← -1 - 1j
            i ← i + 1
        if (inMass[count - 1] == 1) and (inMass[count] == 0)
            result[i] ← 1 - 1j
            i ← i + 1
        count ← count + 2
    return result
QPSKRes := QPSK(rndNumbersRes, N)
# 4. ОБПФ
OFDMRes := dft(QPSKRes)
i := 0 .. N/2 - 1
# [plot: |OFDMRes[i]| vs i]
# 5. Генерация шумов и искажение сигнала
start := -20
D := 50
noise(start, D) :=
    for i ∈ 0, 1 .. D
        result[i] ← sqrt(1/(log(4, 2)*2*10^(0.1*(start - i))))
    return result
noiseRes := noise(start, D)
SignalPlusNoise(inMass, inNoise, D) :=
    for i ∈ 0, 1 .. D
        σ ← inNoise[i]
        for j ∈ 0, 1 .. N/2 - 1
            buf[j] ← inMass[j] + σ*cos(2*π*rnd(1)*sqrt(-2*ln0(rnd(1)))) + 1j*σ*cos(2*π*rnd(1)*sqrt(-2*ln0(rnd(1))))
        result[i] ← buf
    return result
SignalPlusNoiseRes := SignalPlusNoise(OFDMRes, noiseRes, D)
# [plot: ||SignalPlusNoiseRes[7][i]|| vs i]
# 6. ПБПФ
QPSKNoise(inMass, N, D) :=
    for i ∈ 0, 1 .. D
        buf ← idft(inMass[i])
        result[i] ← buf
    return result
QPSKNoiseRes := QPSKNoise(SignalPlusNoiseRes, N, D)
# 7. Демодуляция QPSK
rndNumbersNoise(N, inMass, D) :=
    for i ∈ 0, 1 .. D
        BUF ← inMass[i]
        for count ∈ 0 .. N/2 - 1
            if Re(BUF[count]) ≥ 0 and Im(BUF[count]) ≥ 0
                result[2*count] ← 0
                result[2*count + 1] ← 0
            if Re(BUF[count]) < 0 and Im(BUF[count]) ≥ 0
                result[2*count] ← 0
                result[2*count + 1] ← 1
            if Re(BUF[count]) < 0 and Im(BUF[count]) < 0
                result[2*count] ← 1
                result[2*count + 1] ← 1
            if Re(BUF[count]) ≥ 0 and Im(BUF[count]) < 0
                result[2*count] ← 1
                result[2*count + 1] ← 0
        globalRes[i] ← result
    return globalRes
rndNumbersNoiseRes := rndNumbersNoise(N, QPSKNoiseRes, D)
# 8. BER
BER(inMass1, inMass2, N, D) :=
    for i ∈ 0, 1 .. D
        error ← 0
        BUF ← inMass2[i]
        for j ∈ 0, 1 .. N - 1
            if inMass1[j] ≠ BUF[j]
                error ← error + 1
        result[i] ← error/N
    return result
BERRes := BER(rndNumbersRes, rndNumbersNoiseRes, N, D)
i := start, start - 1 .. start - D = [
    -20; -21; -22; -23; -24; -25; -26; -27; -28; -29
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]
# [plot: BERRes vs i]
