# Федеральное государственное бюджетное образовательное
# учреждение высшего образования
# "Сибирский государственный университет телекоммуникаций и информатики"
# Кафедра ТС и ВС
# Лабораторная работа №2.
# WLAN-сети. Проектирование сетей Wi-Fi.
# Выполнили:
# ст-ты гр. МГ-172
# Тищенко И. В.
# Колесников А. Д.
# Проверил:
# Ахпашев Р. В.
# Новосибирск, 2018
# Исходные данные:
# Мощность передатчика точки доступа:
P_W_AP := 20  # дБ
# Мощность передатчика пользовательского теминала:
P_W_USER := 20  # дБ
# Коэффициент усиления антены точки доступа:
ANT_GAIN_AP := 6  # дБи
# Запас мощности сигнала на проникновение сквозь стены:
CLUTTER := 12  # дБ
# Запас мощности сигнала на интерференцию:
IM := 5  # дБ
# Модель распространения сигнала:
# UMiNLOS
# Диапазон частот:
# 2.4 ГГц и 5 ГГц
# Полоса частот в UL:
BW_UL := 15  # МГц
# Полоса частот в DL:
BW_DL := 20  # МГц
# Коэффициент шума приемника точки доступа:
NF_AP := 5  # дБ
# Коэффициент шума приемника пользователя:
NF_USER := 8  # дБ
# Требуемое отношение SINR для DL:
REQUE_SINR_DL := 17  # дБ
# Требуемое отношение SINR для UL:
REQUE_SINR_UL := 15  # дБ
# Расчет для направления DL:
# Тепловые шумы:
THERMAL_NOISE_DL := -174 + 10*log(BW_DL*10^6, 10) = -100.99
# Чувствительность приемника:
RX_USER := THERMAL_NOISE_DL + NF_USER + REQUE_SINR_DL = -75.9897
# Формула бюджета нисходяжего канала:
P_W_AP - LOSS_F_OR_J + ANT_GAIN_AP - PL(d) - IM - CLUTTER ≥ RX_USER
# Максимально допустимые потери:
MAPL_DL == PL(d) == -RX_USER + P_W_AP - LOSS_F_OR_J + ANT_GAIN_AP - IM - CLUTTER
LOSS_F_OR_J := 0
MAPL_DL := -RX_USER + P_W_AP - LOSS_F_OR_J + ANT_GAIN_AP - IM - CLUTTER = 84.9897
# Расчет для направления UL:
# Тепловые шумы:
THERMAL_NOISE_UL := -174 + 10*log(BW_UL*10^6, 10) = -102.239
# Чувствительность приемника:
RX_AP := THERMAL_NOISE_UL + NF_AP + REQUE_SINR_UL = -82.2391
# Формула бюджета восходящего канала:
P_W_USER - PL(d) - IM - CLUTTER + ANT_GAIN_AP - LOSS_F_OR_J ≥ RX_AP
# Максимально допустимые потери:
MAPL_UL == PL(d) == -RX_AP + P_W_USER - IM - CLUTTER + ANT_GAIN_AP - LOSS_F_OR_J
LOSS_F_OR_J := 0
MAPL_UL := -RX_AP + P_W_USER - IM - CLUTTER + ANT_GAIN_AP - LOSS_F_OR_J = 91.2391
# Затухание сигнала для модели UMiNLOS :
# Для 2.4 ГГц :
PL_2.4(d) := 26*log(2.4, 10) - 22.7 + 36.7*log(d, 10)
# Для 5 ГГц :
PL_5(d) := 26*log(5, 10) - 22.7 + 36.7*log(d, 10)
d := 0 .. 1000
# Радиус покрытия для DL:
# [plot: MAPL_DL, PL_2.4(d), PL_5(d) vs d]
# Радиус покрытия для UL:
# [plot: MAPL_UL, PL_2.4(d), PL_5(d) vs d]
# Контрольные вопросы:
# 1. Поясните, чем обучловлены различия в скоростях передачи данных существующих Wi-Fi стандартах?
# Ответ:
# Обусловлено применением различной цифровой модуляции, видом кодирования, технологии модуляции сигнала, типом используемых антен и диапазоном частот
# 2. Каковы основные достоинства и недостатки технологии OFDM?
# Ответ:
# Достоинтсва: способность противостоять сложным условиям в радиоканале, таким как межсимвольная интерференция и узкополосные помехи; простата реализации метода цифровой обработки; возможность использования различных схем модуляции.
# Недостатки: необходима высокоточная синхронизация и по времени и по частоте и использование защитных интервалов; технология характеризуется высоким уровнем пик-фактора, в линии вверх, что приводит к черезмерным энергетическим затратам.
# 3. В каких режимах может работать MIMO в IEEE802.11n?
# Ответ:
# MIMO 4x4 - 4 потока с возможной пиковой скоростью до 520 Мбит/с.
# MU-MIMO - многопользовательская система MIMO.
# 4. В чем заключается отличие между FDM и OFDM?
# Ответ:
# Применением в OFDM ортогональных кодов, что позовляет в полосе частот использовать до нескольких тысяч поднесущих.
# 5. Для чего используется прекодирование при формировании сигналов для MIMO?
# Ответ:
# Прекодирование – ключевая операция в схеме MIMO c обратной связью, позволяющая согласовать излучаемый сигнал с характеристиками канала. Идеально подобранные весовые коэффициенты позволяют сформировать неинтерферирующие между собой тракты распространения радиоволн в системе MIMO.
# 6. Какие модели распростанения сигналов используются для расчетов радиопоекрытия сетей Wi-Fi?
# Ответ:
# Модель свободного пространства и модель UMiNLOS(учитывающая внешние помехи).
# 7. Какие основные состовляющие бюджета восходящего (UL) и нисходящего (DL) каналов в сетях Wi-Wi?
# Ответ:
# См. решение лаб. раб.
# 8. Чем отдичается чувствительность приемника Wi-Fi точки доступа и пользовательского терминала?
# Ответ:
# Аппаратным шумом и шумом в полосе приема сигнала.
