# Федеральное государственное бюджетное образовательное
# учреждение высшего образования
# "Сибирский государственный университет телекоммуникаций и информатики"
# Кафедра ТС и ВС
# Лабораторная работа №3.
# Разработка имитационной модели планировщика радиоресурсов в сети LTE.
# Выполнили:
# ст-ты гр. МГ-172
# Тищенко И. В.
# Колесников А. Д.
# Проверил:
# Ахпашев Р. В.
# Новосибирск, 2018
# Исходные данны:
# Технология:
# LTE
# Дуплексирование:
# FDD
# MI-MO:
# нет
# Ширина полосы:
# 10 МГц
# Значения CQI:
# 2000 м - CQI=3
# 1500 м - CQI=6
# 1000 м - CQI=9
# 500 м  - CQI=15
# Число абонентов:
# 600
# Радиус соты:
# 2000 м
# Уровни агрегирования CCE:
# 1/2/4/8
# Доля ССЕ (DL):
# 2/3
# MAC-планировщик:
# Maximum C/I
# Распределение абонентов по соте:
user := 600
local(user) :=
    for i ∈ 0 .. user
        rand ← rnd(2000)
        if rand ≤ 2000
            user_local[i] ← 3
        if rand ≤ 1500
            user_local[i] ← 6
        if rand ≤ 1000
            user_local[i] ← 9
        if rand ≤ 500
            user_local[i] ← 15
    return user_local
num(user_local, user) :=
    num[0] ← 0
    num[1] ← 0
    num[2] ← 0
    num[3] ← 0
    for i ∈ 0 .. user
        if user_local[i] == 15
            num[0] ← num[0] + 1
        if user_local[i] == 9
            num[1] ← num[1] + 1
        if user_local[i] == 6
            num[2] ← num[2] + 1
        if user_local[i] == 3
            num[3] ← num[3] + 1
    return num
user_local := local(user)
num := num(user_local, user)
# Программа планировщика:
plan(rate, user_local, user) :=
    block_user[0] ← 0
    block_user[1] ← 0
    block_user[2] ← 0
    block_user[3] ← 0
    for i ∈ 0 .. user
        time_between_data_user[i] ← round((-log(1 - rnd(1), 10))*10/rate, 0)
        buf_data_user[i] ← 0
    for msec ∈ 0 .. 1000
        free_subframe ← 50
        for i ∈ 0 .. user
            if time_between_data_user[i] == 0
                time_between_data_user[i] ← round((-log(1 - rnd(1), 10))*10/rate, 0)
                buf_data_user[i] ← buf_data_user[i] + 1
            else
                time_between_data_user[i] ← time_between_data_user[i] - 1
        for i ∈ 0 .. user
            if (buf_data_user[i] > 0) and (user_local[i] == 15)
                while (buf_data_user[i] > 0) and (free_subframe > 0)
                    buf_data_user[i] ← buf_data_user[i] - 1
                    free_subframe ← free_subframe - 1
        for i ∈ 0 .. user
            if (buf_data_user[i] > 0) and (user_local[i] == 9)
                while (buf_data_user[i] > 0) and (free_subframe > 0)
                    buf_data_user[i] ← buf_data_user[i] - 1
                    free_subframe ← free_subframe - 1
        for i ∈ 0 .. user
            if (buf_data_user[i] > 0) and (user_local[i] == 6)
                while (buf_data_user[i] > 0) and (free_subframe > 0)
                    buf_data_user[i] ← buf_data_user[i] - 1
                    free_subframe ← free_subframe - 2
        for i ∈ 0 .. user
            if (buf_data_user[i] > 0) and (user_local[i] == 3)
                while (buf_data_user[i] > 0) and (free_subframe > 0)
                    buf_data_user[i] ← buf_data_user[i] - 1
                    free_subframe ← free_subframe - 4
        for i ∈ 0 .. user
            if (buf_data_user[i] > 0) and (user_local[i] == 15)
                block_user[0] ← block_user[0] + 1
            if (buf_data_user[i] > 0) and (user_local[i] == 9)
                block_user[1] ← block_user[1] + 1
            if (buf_data_user[i] > 0) and (user_local[i] == 6)
                block_user[2] ← block_user[2] + 1
            if (buf_data_user[i] > 0) and (user_local[i] == 3)
                block_user[3] ← block_user[3] + 1
    return block_user
# Вероятность блокировки:
x1(i) := plan(0.1, user_local, user)[i]/(1000*num[i])
x6(i) := plan(0.6, user_local, user)[i]/(1000*num[i])
x2(i) := plan(0.2, user_local, user)[i]/(1000*num[i])
x7(i) := plan(0.7, user_local, user)[i]/(1000*num[i])
x3(i) := plan(0.3, user_local, user)[i]/(1000*num[i])
x8(i) := plan(0.8, user_local, user)[i]/(1000*num[i])
x4(i) := plan(0.4, user_local, user)[i]/(1000*num[i])
x9(i) := plan(0.9, user_local, user)[i]/(1000*num[i])
x5(i) := plan(0.5, user_local, user)[i]/(1000*num[i])
Agg_lvl1 := [x1(0); x2(0); x3(0); x4(0); x5(0); x6(0); x7(0); x8(0); x9(0)] = [0; 0; 0; 0; 0; 0; 0; 0; 0]
Agg_lvl2 := [x1(1); x2(1); x3(1); x4(1); x5(1); x6(1); x7(1); x8(1); x9(1)] = [0; 0; 0; 0; 0; 0.000138686; 0.00207299; 0.0200584; 0.163577]
x := [0.1; 0.2; 0.3; 0.4; 0.5; 0.6; 0.7; 0.8; 0.9]
Agg_lvl4 := [x1(2); x2(2); x3(2); x4(2); x5(2); x6(2); x7(2); x8(2); x9(2)] = [0; 0; 0.00119355; 0.124916; 0.430535; 0.679006; 0.84469; 0.959981; 0.995652]
Agg_lvl8 := [x1(3); x2(3); x3(3); x4(3); x5(3); x6(3); x7(3); x8(3); x9(3)] = [1.38889e-5; 0.103153; 0.731965; 0.988243; 0.991375; 0.993889; 0.994757; 0.995944; 0.996903]
G1 := lspline(x, Agg_lvl1)
G2 := lspline(x, Agg_lvl2)
G4 := lspline(x, Agg_lvl4)
G8 := lspline(x, Agg_lvl8)
i := 0.1, 0.15 .. 0.9
# [plot: interp(G1, x, Agg_lvl1, i), interp(G2, x, Agg_lvl2, i), interp(G4, x, Agg_lvl4, i), interp(G8, x, Agg_lvl8, i) vs i]
# Контрольные вопросы:
# 1. Перечислите основные функции, реализуемые в рамках MAC-протокола LTE?
# Ответ:
# Мультиплексирование пакетов услуг, исправление ошибок через запросы на повторную передачу, управление приоритетом логических канлов, идентификация услуг, выбор транспортного формата.
# 2.Назовите методы распределения ресурсов между пользователями и перечислити их основные достоинства и недостатки:
# Ответ:
# Round Robin ("по очереди"). Преимущество: справедливое распределение ресурса. Недостаток: низкая пропускная способность.
# Maximum CQI. Преимущество: более высокая пропускная способность. Недостаток: несправедливое отношение к абонентам на крою соты.
# Proportional Fair. Преимущества: более компромисный вариан.
# 3. Ресурсы каких физических каналов назначаются абонентам на конкуретной основе планировщиком БС eNodeB?
# Ответ:
# PDCCH и PDSCH
# 4. Что за проблема скрывается за выражением "Blocked PDCHH"?
# Ответ:
# Случай, когда планировщик исчерпал все CCE-ресурсы, не распределив весь запрашиваемый трафик, можно говорить о заблокированном канале по причине нехватки канала управления.
# 5. Что такое CQI?
# Ответ:
# Это индикатор качества нисходящего канала, отправляемый мобильными терминалами на основании измерения SNR и вычисления значения BLER.
# 6. Что означает маштабируемость сетей LTE?
# Ответ:
# Масштабируемость заключается в том, что оператор может развернуть сеть LTE в полосе частот шириной от 1.4 до 20 МГц, практически в любом лицензируемом диапазоне, а также в режиме TDD или FDD
# 7. Чем отличается режимы дуплексирования TDD и FDD. Преимущества и недостатки каждого из способов?
# FDD - 2 канала (один для UL, другой для DL). TDD - 1 канал (временное разделение)
# Преимущества FDD: большая пропускная способность
# Недостатки FDD: спаренный спектр, кпд, дорогой радиомодуль
# Преимущества TDD: любая полоса частот, кпд, дешевле радиомодуль
# Недостатки TDD: меньшая скорость
