# ИСХОДНЫЕ ДАННЫЕ:
# Номер в журнале:
Number := 23
# Номер варианта(параметра) для выполенния курсовой работы:
N := mod(Number, 10) = 3
# Диапазон частот, ГГц:
1.9
# Режим дупликсирования:
FDD
# Ширина полосы частот (BW), МГц:
BW := 15
# Мощность передатчика еNB, Вт:
TxPowerENodeB := 40
# Усиление антены eNB, dBi:
AntGainENodeB := 16
# Потери в антенно-фидерном тракте, dBi:
FeederLoss := 2
# Тип местности:
URBAN
# Требуемая скорость в UL на краю соты, Мбит/с:
SpeedUL := 0.26
# Требуемая скорость в DL на карю соты, Мбит/с:
SpeedDL := 0.6
# Шумы eNB (NF), дБ:
NoiseFigureENodeB := 2.2
# Шумы абонентского терминала UE (NF), дБ:
NoiseFigureUE := 6.5
# Высота подвеса антенны eNB, м:
hENodeB := 70
# Высота антенны UE, м:
hUE := 1.7
# Потери сигнала на проникновения(застройка), дБ:
PenetrationM := 20
# Площадь, тыс. км.кв:
CoveredArea := 260
# Число абонентов, тыс. чел:
NumSub := 290
# Объем трафика скачиваемый абонентов в ЧНН (DL), Мбайт:
SpeedTrafficSub := 13
# Число секторов БС (eNB):
2
# Максимальное число eNodeB, подключаемых к одному S-GW:
MaxForSGW := 200
# Максимальное число eNodeB, подключаемых к одному MME:
MaxForMME := 350
# 1. Выбор модели распространения сиганала:
# Ввиду таких исходных параметров как:
# - Диапазон частот = 1.9 ГГц ( 150 МГц < 1.9 ГГц < 2 ГГц)
# - Высота повеса антены БС = 70 м (30 м < 70 м < 200 м)
# - Высота антены МС = 1.7 м (1 м < 1.7 м < 10 м)
# - Тип местности: URBAN
# в качестве модели распространения сигнала выбрана модель Окумура-Хата.
# 2. Построение зависимости потерь сигнала от расстояния между абонентами и базовой станцией:
# Коэффициенты A и B для диапазона частот 1.5-2 ГГЦ:
A := 46.3
B := 33.9
# Параметр а для городской и плотной городской местности:
a := 3.2*log(11.75*hUE, 10)^2 - 4.97 = 0.442051
# Параметр Lclutter для городской местности:
Lclutter := 0
# Параметр s:
# d < 1км:
h_BS := 70
s1 := (47.88 + 13.9*log(1900, 10) - 13.9*log(h_BS, 10))*1/log(50, 10) = 39.9111
# d ≥ 1км:
s2 := 44 - 6.55*log(1900, 10) = 22.5242
# Формула для расчета затуханий:
d := 1 .. 1200
PL(d) :=
    if d < 1000
        result ← A + B*log(1900, 10) - 13.82*log(h_BS, 10) - a + s1*log(d/1000, 10) + Lclutter
    else
        result ← A + B*log(1900, 10) - 13.82*log(h_BS, 10) - a + s2*log(d/1000, 10) + Lclutter
    return result
# [plot: PL(d) vs d]
# График потери мощности радиосигнала:
# 3. Расчет бюджета восходящего и нисходящего каналов и оценка максимально допустимых потерь в обоих направлениях (MAPL):
# Тепловой шум приемника:
ThermalNoise := -174 + 10*log(BW*10^6, 10) = -102.239
# Требуемое отношение мощности сигнала к мощности шума для БС:
# Для обеспечения требуемой скорости 0.26 Мбит/с в направлении UL, неоходимо взять MCS со спектральной плотностью не менее чем x:
SpeedUL*10^6 == x*BW*10^6
x := SpeedUL*10^6/(BW*10^6) = 0.0173333
# Таким образом, для обеспечения требуемой скорости, необходимо взять MCS №1 - QPSK1/32, которого:
ReqiredSINRENodeB := 2.1
# Чувствительность приемного устройства БС:
RxSensENodeB := NoiseFigureENodeB + ThermalNoise + ReqiredSINRENodeB = -97.9391
# Требуемое отношение мощности сигнала к мощности шума для МС:
# Для обеспечения требуемой скорости 0.6 Мбит/с в направлении DL, неоходимо взять MCS со спектральной плотностью не менее чем x:
SpeedDL*10^6 == x*BW*10^6
x := SpeedDL*10^6/(BW*10^6) = 0.04
# Таким образом, для обеспечения требуемой скорости, необходимо взять MCS №1 - QPSK1/32, которого:
ReqiredSINRUE := 2.1
# Чувствительность приемного устройства МС:
RxSensUE := NoiseFigureUE + ThermalNoise + ReqiredSINRUE = -93.6391
# 3.1 Бюджет нисходящего канала(DL Budget):
TxPowerENodeB := 10*log(TxPowerENodeB*1000, 10) = 46.0206
IM := 5
TxPowerENodeB - FeederLoss + AntGainEnodeB - PL(d) - IM - PenetrationM ≥ RxSensUE
MAPL_DL == PL(d)
MAPL_DL := -RxSensUE + TxPowerENodeB - FeederLoss + AntGainENodeB - IM - PenetrationM
MAPL_DL = 128.66
# 3.2 Бюджет восходящего канала(UL Budget):
TxPowerUE := 23
IM := 5
TxPowerUE - FeederLoss + AntGainEnodeB - PL(d) - IM - PenetrationM ≥ RxSensENodeB
MAPL_UL == PL(d)
MAPL_UL := -RxSensENodeB + TxPowerUE - FeederLoss + AntGainENodeB - IM - PenetrationM
MAPL_UL = 109.939
# [plot: PL(d), MAPL_DL, MAPL_UL vs d]
# Используя модель распростарнения Окамура-Хата, получаем радиус соты в восходящем канала 250м и в нисходящем 850м. В результате зона действия соты ограничина радиусом 250м.
# Вычислим реальный радиус соты, учитывая высоту подвеса БС и МС, используя теорему Пифагора:
RENodeB := sqrt(300^2 - (hENodeB - hUE)^2) = 292.122
# 3.3 Площадь покрытия базовой станции:
# Для двухсекторной БС S=1.73R^2
SENodeB := 1.73*RENodeB^2 = 147630
# 4. Расчет требуемой пропускной способности сети, в зависиимости от кол-ва абонентов и скачиваемого ими трафика в ЧНН.
SpeedRequired := NumSub*10^3*SpeedTrafficSub*10^6*8/(60*60) = 8.37778e9
SpeedRequired := SpeedRequired/10^9 = 8.37778
# 5. Расчет пропускной способности ENodeB
# Число полезных ресурсных блоков в полосе частот 15 МГц:
NumResBlock := 75
# Количество OFDM символов в блоке:
CP := 6
NumSumbolBlock := 12*6 = 72
# Количество OFDM символов в подкадре(1 мс):
NumSumbolSubframe := 2*NumSumbolBlock = 144
# Количество OFDM символов в 1c выделенной для абонента:
NumSumbolInsec := NumSumbolSubframe*1000 = 144000
# Количество OFDM символов в 1с во всей полосе частот:
NumSumbolInsecBW := NumSumbolInsec*NumResBlock = 10800000
# Количество бит/с в полосе частот для модуляции QAM 1/3:
kpd := 1/3
NumBitsecBW := NumSumbolInsecBW*4*kpd = 14400000
NumBitsecBW := NumBitsecBW/10^6 = 14.4
# 6. Оборудование
NumENodeBLoad := SpeedRequired*10^3/NumBitsecBW = 581.79
NumENodeBS := CoveredArea*10^6/SENodeB = 1761.16
NumSGW := NumENodeBS/MaxForSGW = 8.80581
NumMME := NumENodeBS/MaxForMME = 5.03189
