# Федеральное государственное бюджетное образовательное
# учреждение высшего образования
# "Сибирский государственный университет телекоммуникаций и информатики"
# Кафедра ТС и ВС
# Лабораторная работа №4.
# Расчет абонентской емкости в мобильных сетях 2G, 3G и 4G.
# Выполнили:
# ст-ты гр. МГ-172
# Тищенко И. В.
# Колесников А. Д.
# Проверил:
# Ахпашев Р. В.
# Новосибирск, 2018
# Исходные данные для 2G:
# Число приемо-передатчиков на одной БС:
3
# ЧИсло каналов управления на одной БС:
2
# Вероятность отказа в установлении соединения абонента:
Pblock := 0.05
# Интенсивность нагрузки одного абонента в ЧНН:
g := 0.03
# Расчет для 2G:
# Формула Эрланга:
Pblock == 1/sum(G^i/i!, i = 0 .. 2*3 - 1)*G^(2*3)/(2*3!)
# Суммарная нагрузка на БС:
G := 2.92
# Число абонентов, обслуживаемых одной БС:
N2 := floor(G/g) = 97
# Исходные данные для 3G:
# Скорость передачи данных для голосовых услуг:
R := 11
# Требуемое отношение сигнал/шум:
EN := 6.3
# Чиповая скорость в WCDMA:
W := 3.84
# Коэффициент ортогональности кода:
α := 0.5
# Коэффициент интерференции по соседней соте:
i := 0.6
# Затраты ресурсов на мягкий хэндовер:
SHO := 0.26
# Коэффициент загрузки нисходящего канала:
η := 0.6
# Коэффициент активного абонента:
u := 0.62
# Расчет для 3G:
# Число абонентов, обслуживаемых одной БС:
N3 := floor(η/((1 - α + i)*(1 - SHO)*(1/(1 + EN))*W/R*u)) = 24
# Исходные данные для 4G:
# Ширина полосы частот:
BW := 10
# Цикилический перфикс:
CP := 6
# Требуемая скорость передачи на физическом уровне:
Speed := 20
# Режим MI-MO:
α := 2
# Затраты на доп. сиганала:
β := 0.3
# Процент ретрансмисии:
γ := 0.1
# MCS:
QAM16_4Ι5
# Режим дуплексирования:
FDD
# Расчет для 4G:
# Число ресурсных блоков:
NumResBlock := 50
# Число OFDM символов в одном блоке:
NumSumbolBlock := 12*CP = 72
# Число OFDM символов в подкадре (1 мсек.):
NumSumbolSubframe := 2*NumSumbolBlock = 144
# Число OFDM символов 1 сек.:
SpeedSumbolInsec := NumSumbolSubframe*1000 = 144000
# Число OFDM символов 1 сек. во всей полосе частот:
SpeedSumbolInsecBW := SpeedSumbolInsec*NumResBlock = 7200000
# Число OFDM символов 1 сек. во всей полосе частот c учетом MI-MO:
SpeedSumbolInsecBWMimo := SpeedSumbolInsecBW*2 = 14400000
# Число OFDM символов в 1 сек. c доп затрат:
SpeedSumbol := SpeedSumbolInsecBWMimo*(1 - β)*(1 - γ) = 9072000
# Число бит в 1 сек.:
SpeedBit := SpeedSumbol*4*(4/5) = 29030400
# Число абонентов:
NumFollow := floor(SpeedBit/(Speed*10^3)) = 1451
# Контрольные вопросы:
# 1. Поясните основные преимущества мобильных (или сотовых) сетей по сравнению с другими проводными и беспроводными технологиями?
# Ответ:
# - Портативность и мобильность при использовании
# - Хорошее качество
# - Разные способы общения (голос, видео, текст)
# - Получение доступа к высокоскоростному Интернету
# - Дополнительные усоуги операторов
# 2. Какие технологии передачи данных поддерживаются в каждом поколении сетей?
# Ответ:
# 2G - CSD (до 14.4 кБит/с), GPRS (до 115 кБит/с), WAP (до 153 кБит/с,), EDGE (до 474 кБит/с).
# 3G - UMTS (до 2 мБит/с), HSDPA (до 14.4 мБит/с),  DC-HSDPA (до 28.8 мБит/с), HSPA+ (до 21.6мБит/с), DC-HSPA+ (до 42.2 мБит/с)
# 4G - LTE (до 300 мБит/с), LTE-A (до 1 гБит/с)
# 3. Чем принципиально отличается архитектура сетей 2, 3 и 4G?
# Ответ:
# В 2G и 3G систему можно было разделить на 2 части: RAN и CORE. В 4G появилось такое понятие как RAN и IMS (вместо CORE).
# 4. За счет чего возможно увеличение абонентской емкости в сетях 2, 3 и 4G.
# Ответ:
# 2G - повторное использование частот, кол-во частот
# 3G - ширина полосы, ко-во частот, MI-MO
# 4G - ширина полосы, ко-во частот, MI-MO, модуляция
# 5. Что означает FDD и TDD? Каковы достоинства и недостатки этих режимов?
# Ответ:
# Частотное и временное разделение каналов.
# Преимущества FDD: большая пропускная способность
# Недостатки FDD: спаренный спектр, кпд, дорогой радиомодуль
# Преимущества TDD: любая полоса частот, кпд, дешевле радиомодуль
# Недостатки TDD: меньшая скорость
# 6. Что такое "мягкий" хэндовер в сетях WCDMA?
# Ответ:
# Хэндовер, при котором с абонентом при переходе из зоны действия одной БС в другую не рпоизойдет разрыв срединения. (в момент перехода с абонентом поддерживают связь обе БС)
# 7. Какого назначение транскодера в сетях GSM:
# Ответ:
# Устройство, отвечающее за перекодирование речи из формата GSM в стандартный формат телефонии, используемый в фиксированных сетях связи и обратно
# 8. Для чего используется интерфейс X2 в сетях LTE?
# Ответ:
# Взаимодейтвие между соседними БС.
